OpenVSP model (file version 5), 18 components.
Geometry view with OpenVSP parameter names; values to 6 digits, angles in degrees, lengths in the model's unit.
Overall bounding box: X_Min=-0.836516 X_Len=100.837 Y_Min=-69.7336 Y_Len=139.467 Z_Min=-4 Z_Len=16.6708

Fuselage "FuselageGeom"
  location (X Y Z) 0 0 0, rotation 0 0 0
  bounding box size 100.837 20 8
  mass: Density=0 Shell_Flag=1 Mass_Area=1 Mass_Prior=0
  Design: Length=100
  cross sections:
    n  XLocPercent  YLocPercent  ZLocPercent  shape
    0  0            0            -0.01        ellipse Ellipse_Height=3 Ellipse_Width=6
    1  0.2          0            0            edit curve Width=20 Height=8 AbsoluteFlag=1 SymType=1 cubic Bezier points (X Y): 0.5 -0.125, 0.5 -0.25, 0.3 -0.5, 0.25 -0.5, 0.166667 -0.5, 0.0833333 -0.5, 0 -0.5, -0.0833333 -0.5, -0.166667 -0.5, -0.25 -0.5, -0.3 -0.5, -0.5 -0.25, -0.5 -0.125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
    2  0.82         0            0            as above
    3  1            0            -0.03        ellipse Ellipse_Height=0.2 Ellipse_Width=7

Wing "Tail", child of "FuselageGeom"
  location (X Y Z) 81.35 7.66 -2.15, rotation 35 -10.5 0
  symmetric about XZ
  bounding box size 18.7345 48.8442 15.3622
  mass: Density=0 Shell_Flag=1 Mass_Area=1 Mass_Prior=0
  totals: TotalSpan=40 TotalProjectedSpan=40 TotalChord=8 TotalArea=320 TotalAR=5 MAC=8.42667
  root: chord 11.2, twist 0, airfoil file "NASA SC(2)-0412 AIRFOIL"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 BaseThickChord=0.120007 ThickChord=0.120007
  sections:
    n  Span  Root_Chord  Tip_Chord  Area  Sweep  Sweep_Location  Dihedral  Twist  Twist_Location  tip airfoil
    1  20    11.2        4.8        160   35     0               0         0      0.25            as above
  SS_Control "ruddervator": UStart=0.37 UEnd=0.64 Length_C_Start=0.25 Length_C_End=0.25 Length_Start=2.624 Length_End=1.328 LE_Flag=0 Surf_Type=2

Stack "Engine Example", child of "FuselageGeom"
  location (X Y Z) 75 3.3 0, rotation 0 0 0
  symmetric about XZ
  bounding box size 16.2878 13.4419 6.84189
  mass: Density=0 Shell_Flag=0 Mass_Area=1 Mass_Prior=0 PointMass=6100 CGx=3 CGy=0 CGz=0 Ixx=0 Iyy=0 Izz=0 Ixy=0 Ixz=0 Iyz=0
  cross sections:
    n  XDelta  YDelta  ZDelta  shape
    0  0       0       0       circle Circle_Diameter=5.8
    1  4       0       0       as above
    2  4       0       0       as above
    3  4       0       0       as above
    4  -12     0       0       as above

Conformal "Bombbay", child of "FuselageGeom"
  location (X Y Z) 0 0 0, rotation 0 0 0
  bounding box size 24.5148 14.7038 6.5
  mass: Density=0 Shell_Flag=0 Mass_Area=1 Mass_Prior=35 PointMass=17000 CGx=43 CGy=0 CGz=0 Ixx=0 Iyy=0 Izz=0 Ixy=0 Ixz=0 Iyz=0
  Design: ChordTrimFlag=0 ChordTrimMax=0.9 ChordTrimMin=0.1 EtaTrimMax=0.9 EtaTrimMin=0.1 L01Max=1 L01Min=1 L0LenTrimMax=57.9308 L0LenTrimMin=21.9737 LTrimMax=0.574567 LTrimMin=0.217939 OffSetEnds=0 Offset=0.75 Side1Trim=0.15 Side1TrimFlag=1 Side2Trim=0.15 Side2TrimFlag=1 Side3Trim=0.1 Side3TrimFlag=0 Side4Trim=0.1 Side4TrimFlag=1 UMaxTrimTypeFalg=0 UMinTrimTypeFalg=0 UTrimFlag=1 UTrimMax=0.515 UTrimMin=0.41 V1TrimBegin=0.9 V1TrimEnd=0.1 V1TrimFlag=0 V2TrimBegin=0.4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

Conformal "electronics", child of "FuselageGeom"
  location (X Y Z) 0 0 0, rotation 0 0 0
  bounding box size 22.4492 19 7.0975
  mass: Density=0 Shell_Flag=0 Mass_Area=1 Mass_Prior=0 PointMass=10800 CGx=12 CGy=0 CGz=0 Ixx=0 Iyy=0 Izz=0 Ixy=0 Ixz=0 Iyz=0
  Design: ChordTrimFlag=0 ChordTrimMax=0.9 ChordTrimMin=0.1 EtaTrimMax=0.9 EtaTrimMin=0.1 L01Max=1 L01Min=1 L0LenTrimMax=16.1713 L0LenTrimMin=0 LTrimMax=0.160161 LTrimMin=0 OffSetEnds=0 Offset=0.5 Side1Trim=0.1 Side1TrimFlag=0 Side2Trim=0.1 Side2TrimFlag=0 Side3Trim=0.1 Side3TrimFlag=0 Side4Trim=0.1 Side4TrimFlag=0 UMaxTrimTypeFalg=0 UMinTrimTypeFalg=0 UTrimFlag=1 UTrimMax=0.36 UTrimMin=0 V1TrimBegin=0.9 V1TrimEnd=0.1 V1TrimFlag=0 V2TrimBegin=0.4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

Conformal "Sonobouys and Electronics", child of "FuselageGeom"
  location (X Y Z) 0 0 0, rotation 0 0 0
  bounding box size 4.83516 14.7038 6.1555
  mass: Density=0 Shell_Flag=0 Mass_Area=1 Mass_Prior=0 PointMass=3000 CGx=58.6 CGy=0 CGz=0 Ixx=0 Iyy=0 Izz=0 Ixy=0 Ixz=0 Iyz=0
  Design: ChordTrimFlag=0 ChordTrimMax=0.9 ChordTrimMin=0.1 EtaTrimMax=0.9 EtaTrimMin=0.1 L01Max=1 L01Min=1 L0LenTrimMax=67.6042 L0LenTrimMin=59.9408 LTrimMax=0.67051 LTrimMin=0.594503 OffSetEnds=0 Offset=0.75 Side1Trim=0.15 Side1TrimFlag=1 Side2Trim=0.15 Side2TrimFlag=1 Side3Trim=0.1 Side3TrimFlag=0 Side4Trim=0.3 Side4TrimFlag=1 UMaxTrimTypeFalg=0 UMinTrimTypeFalg=0 UTrimFlag=1 UTrimMax=0.54 UTrimMin=0.52 V1TrimBegin=0.9 V1TrimEnd=0.1 V1TrimFlag=0 V2TrimBegin=0.4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

Fuselage "Jet Flowpath", child of "FuselageGeom"
  location (X Y Z) 48 0 0, rotation 0 0 0
  symmetric about XZ
  bounding box size 52 14.196 12.66
  negative volume
  Design: Length=52
  cross sections:
    n  XLocPercent  YLocPercent  ZLocPercent  shape
    0  0            0            0.138462     rounded rectangle RoundRectXSec_Radius=0.2 RoundRect_Keystone=0.357143 RoundedRect_Height=4.42 RoundedRect_Width=10
    1  0.25         0            0.138462     as above
    2  0.480769     0.074        0            circle Circle_Diameter=6.5
    3  0.75         0.074        0            as above
    4  1            0.074        -0.00819672  rounded rectangle RoundRectXSec_Radius=0.2 RoundedRect_Height=4 RoundedRect_Width=6

Conformal "Intake", child of "Jet Flowpath"
  location (X Y Z) 48 0 0, rotation 0 0 0; relative location 0 0 0, rotation 0 0 0
  symmetric about XZ
  bounding box size 27.8436 14.496 12.96
  mass: Density=1 Shell_Flag=1 Mass_Area=1 Mass_Prior=0
  Design: ChordTrimFlag=0 ChordTrimMax=0.9 ChordTrimMin=0.1 EtaTrimMax=0.9 EtaTrimMin=0.1 L01Max=1 L01Min=1 L0LenTrimMax=32.1893 L0LenTrimMin=0 LTrimMax=0.585912 LTrimMin=0 OffSetEnds=1 Offset=-0.15 Side1Trim=0.1 Side1TrimFlag=0 Side2Trim=0.1 Side2TrimFlag=0 Side3Trim=0.1 Side3TrimFlag=0 Side4Trim=0.1 Side4TrimFlag=0 UMaxTrimTypeFalg=0 UMinTrimTypeFalg=0 UTrimFlag=1 UTrimMax=0.55 UTrimMin=0 V1TrimBegin=0.9 V1TrimEnd=0.1 V1TrimFlag=0 V2TrimBegin=0.4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

Conformal "Fuel Tank 2 Shell", child of "FuselageGeom"
  location (X Y Z) 0 0 0, rotation 0 0 0
  bounding box size 4.60067 19 4.543
  mass: Density=0 Shell_Flag=1 Mass_Area=1 Mass_Prior=3
  Design: ChordTrimFlag=0 ChordTrimMax=0.9 ChordTrimMin=0.1 EtaTrimMax=0.9 EtaTrimMin=0.1 L01Max=1 L01Min=1 L0LenTrimMax=74.3913 L0LenTrimMin=71.2683 LTrimMax=0.73677 LTrimMin=0.70584 OffSetEnds=0 Offset=0.5 Side1Trim=0.15 Side1TrimFlag=0 Side2Trim=0.15 Side2TrimFlag=0 Side3Trim=0.1 Side3TrimFlag=0 Side4Trim=0.4 Side4TrimFlag=1 UMaxTrimTypeFalg=0 UMinTrimTypeFalg=0 UTrimFlag=1 UTrimMax=0.56 UTrimMin=0.55 V1TrimBegin=0.9 V1TrimEnd=0.1 V1TrimFlag=0 V2TrimBegin=0.4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

Conformal "Fuel Tank 2 Fuel", child of "FuselageGeom"
  location (X Y Z) 0 0 0, rotation 0 0 0
  bounding box size 4.60067 19 4.543
  mass: Density=50 Shell_Flag=0 Mass_Area=1 Mass_Prior=4
  Design: ChordTrimFlag=0 ChordTrimMax=0.9 ChordTrimMin=0.1 EtaTrimMax=0.9 EtaTrimMin=0.1 L01Max=1 L01Min=1 L0LenTrimMax=74.3913 L0LenTrimMin=71.2683 LTrimMax=0.73677 LTrimMin=0.70584 OffSetEnds=0 Offset=0.5 Side1Trim=0.15 Side1TrimFlag=0 Side2Trim=0.15 Side2TrimFlag=0 Side3Trim=0.1 Side3TrimFlag=0 Side4Trim=0.4 Side4TrimFlag=1 UMaxTrimTypeFalg=0 UMinTrimTypeFalg=0 UTrimFlag=1 UTrimMax=0.56 UTrimMin=0.55 V1TrimBegin=0.9 V1TrimEnd=0.1 V1TrimFlag=0 V2TrimBegin=0.4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

Conformal "Fuel Tank 1 Shell", child of "FuselageGeom"
  location (X Y Z) 0 0 0, rotation 0 0 0
  bounding box size 6.26085 15.1012 5.488
  mass: Density=0 Shell_Flag=1 Mass_Area=1 Mass_Prior=3
  Design: ChordTrimFlag=0 ChordTrimMax=0.9 ChordTrimMin=0.1 EtaTrimMax=0.9 EtaTrimMin=0.1 L01Max=1 L01Min=1 L0LenTrimMax=20.6855 L0LenTrimMin=18.4812 LTrimMax=0.204869 LTrimMin=0.183038 OffSetEnds=0 Offset=0.5 Side1Trim=0.15 Side1TrimFlag=1 Side2Trim=0.15 Side2TrimFlag=1 Side3Trim=0.4 Side3TrimFlag=1 Side4Trim=0.1 Side4TrimFlag=1 UMaxTrimTypeFalg=0 UMinTrimTypeFalg=0 UTrimFlag=1 UTrimMax=0.4 UTrimMin=0.38 V1TrimBegin=0.9 V1TrimEnd=0.1 V1TrimFlag=0 V2TrimBegin=0.4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

Conformal "Fuel Tank 1 Fuel", child of "FuselageGeom"
  location (X Y Z) 0 0 0, rotation 0 0 0
  bounding box size 6.85546 15.1012 6.811
  mass: Density=50 Shell_Flag=0 Mass_Area=1 Mass_Prior=4
  Design: ChordTrimFlag=0 ChordTrimMax=0.9 ChordTrimMin=0.1 EtaTrimMax=0.9 EtaTrimMin=0.1 L01Max=1 L01Min=1 L0LenTrimMax=20.6855 L0LenTrimMin=18.4812 LTrimMax=0.204869 LTrimMin=0.183038 OffSetEnds=0 Offset=0.5 Side1Trim=0.15 Side1TrimFlag=1 Side2Trim=0.15 Side2TrimFlag=1 Side3Trim=0.3 Side3TrimFlag=1 Side4Trim=0.1 Side4TrimFlag=1 UMaxTrimTypeFalg=0 UMinTrimTypeFalg=0 UTrimFlag=1 UTrimMax=0.4 UTrimMin=0.38 V1TrimBegin=0.9 V1TrimEnd=0.1 V1TrimFlag=0 V2TrimBegin=0.4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

Wing "WingGeom"
  location (X Y Z) 43 0 -1.5, rotation 0 0 0
  symmetric about XZ
  bounding box size 23.555 139.467 7.64887
  mass: Density=0 Shell_Flag=1 Mass_Area=1 Mass_Prior=2
  totals: TotalSpan=140 TotalProjectedSpan=139.467 TotalChord=12 TotalArea=1680 TotalAR=11.578 MAC=13.4393
  root: chord 19.2, twist 2.12, airfoil file "NASA SC(2)-0412 AIRFOIL"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 BaseThickChord=0.120007 ThickChord=0.120007
  sections:
    n  Span  Root_Chord  Tip_Chord  Area  Sweep  Sweep_Location  Dihedral  Twist  Twist_Location  tip airfoil
    1  70    19.2        4.8        840   15     0               5         0      0.25            as above
  SS_Control "Flap1": UStart=0.39 UEnd=0.46 Length_C_Start=0.3 Length_C_End=0.3 Length_Start=5.02544 Length_End=4.11808 LE_Flag=0 Surf_Type=2
  SS_Control "Flat2": UStart=0.462 UEnd=0.535 Length_C_Start=0.3 Length_C_End=0.3 Length_Start=4.09215 Length_End=3.14597 LE_Flag=0 Surf_Type=2
  SS_Control "Aileron1": UStart=0.537 UEnd=0.595 Length_C_Start=0.25 Length_C_End=0.25 Length_Start=2.60004 Length_End=1.97366 LE_Flag=0 Surf_Type=2
  SS_Control "Aileron2": UStart=0.597 UEnd=0.655 Length_C_Start=0.25 Length_C_End=0.25 Length_Start=1.95207 Length_End=1.3259 LE_Flag=0 Surf_Type=2
  SS_Control "Slats": UStart=0.4 UEnd=0.6 Length_C_Start=0.25 Length_C_End=0.25 Length_Start=4.07985 Length_End=1.91967 LE_Flag=1 Surf_Type=2

Conformal "Fuel Tank Wings Shell", child of "WingGeom"
  location (X Y Z) 43 0 -1.5, rotation 0 0 0; relative location 0 0 0, rotation 0 0 0
  symmetric about XZ
  bounding box size 14.9713 119.025 5.81992
  mass: Density=0 Shell_Flag=1 Mass_Area=1 Mass_Prior=3
  Design: ChordTrimFlag=0 ChordTrimMax=0.9 ChordTrimMin=0.1 EtaTrimMax=0.85 EtaTrimMin=0.125 L01Max=1 L01Min=1 L0LenTrimMax=70.969 L0LenTrimMin=0 LTrimMax=0.9999 LTrimMin=0 OffSetEnds=1 Offset=0.1 Side1Trim=0.1 Side1TrimFlag=0 Side2Trim=0.1 Side2TrimFlag=0 Side3Trim=0.1 Side3TrimFlag=0 Side4Trim=0.1 Side4TrimFlag=0 UMaxTrimTypeFalg=0 UMinTrimTypeFalg=0 UTrimFlag=1 UTrimMax=0.85 UTrimMin=0.125 V1TrimBegin=0.85 V1TrimEnd=0.15 V1TrimFlag=1 V2TrimBegin=0.39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

Conformal "Fuel Tank Wings Fuel", child of "WingGeom"
  location (X Y Z) 43 0 -1.5, rotation 0 0 0; relative location 0 0 0, rotation 0 0 0
  symmetric about XZ
  bounding box size 14.9713 119.025 5.81992
  mass: Density=50 Shell_Flag=0 Mass_Area=1 Mass_Prior=4
  Design: ChordTrimFlag=0 ChordTrimMax=0.9 ChordTrimMin=0.1 EtaTrimMax=0.85 EtaTrimMin=0.125 L01Max=1 L01Min=1 L0LenTrimMax=70.969 L0LenTrimMin=0 LTrimMax=0.9999 LTrimMin=0 OffSetEnds=1 Offset=0.1 Side1Trim=0.1 Side1TrimFlag=0 Side2Trim=0.1 Side2TrimFlag=0 Side3Trim=0.1 Side3TrimFlag=0 Side4Trim=0.1 Side4TrimFlag=0 UMaxTrimTypeFalg=0 UMinTrimTypeFalg=0 UTrimFlag=1 UTrimMax=0.85 UTrimMin=0.125 V1TrimBegin=0.85 V1TrimEnd=0.15 V1TrimFlag=1 V2TrimBegin=0.39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

NGonMesh "MeshGeom_NGon"
  location (X Y Z) 0 0 0, rotation 0 0 0

NGonMesh "MeshGeom_NGon"
  location (X Y Z) 0 0 0, rotation 0 0 0

NGonMesh "MeshGeom_NGon"
  location (X Y Z) 0 0 0, rotation 0 0 0

VSPAERO settings (reference component "WingGeom"): Sref=1680 bref=140 cref=12 Xcg=46.8 Ycg=0 Zcg=0 AlphaStart=-2 AlphaEnd=12 AlphaNpts=15 BetaStart=0 BetaEnd=0 BetaNpts=1 MachStart=0.22 MachEnd=0.7 MachNpts=1 ReCref=2e+08 Vinf=100 Rho=0.002377
  control group "Slats": DeflectionAngle=5
  control group "Ailerons": DeflectionAngle=12
  control group "Flaps": DeflectionAngle=1
  control group "ruddervator1": DeflectionAngle=0
  control group "ruddervator2": DeflectionAngle=0
