OpenVSP model (file version 5), 5 components.
Geometry view with OpenVSP parameter names; values to 6 digits, angles in degrees, lengths in the model's unit.
Overall bounding box: X_Min=0 X_Len=60 Y_Min=-31.3392 Y_Len=62.6785 Z_Min=-3.68657 Z_Len=16.1866

Fuselage "Fuselage"
  location (X Y Z) 0 0 0, rotation 0 0 0
  bounding box size 60 5.78555 6.08555
  Design: Length=60
  cross sections:
    n  XLocPercent  YLocPercent  ZLocPercent  shape
    0  0            0            -0.005       point
    1  0.0237074    0            -0.001       ellipse Ellipse_Height=2.39796 Ellipse_Width=2.76582
    2  0.134525     0            0.012        ellipse Ellipse_Height=6 Ellipse_Width=5.7
    3  0.5          0            0.012        as above
    4  0.766393     0            0.012        as above
    5  1            0            0.0280328    point

Wing "Wing", child of "Fuselage"
  location (X Y Z) 17.541 0 -0.57377, rotation 0 0 0
  symmetric about XZ
  bounding box size 23.8837 62.6785 5.4788
  totals: TotalSpan=64 TotalProjectedSpan=62.6785 TotalChord=5.25 TotalArea=390.25 TotalAR=10.0669 MAC=8.07073
  root: chord 14, twist 4, NACA 4-series Camber=0.022 CamberLoc=0.2 ThickChord=0.12
  sections:
    n  Span  Root_Chord  Tip_Chord  Area    Sweep  Sweep_Location  Dihedral  Twist  Twist_Location  tip airfoil
    1  10.5  14          7          110.25  35     0               6.5       3      0.25            as above
    2  19.5  7           1.5        82.875  35     0               6.5       2      0.25            as above
    3  2     1.5         0.5        2       50     0               40        0      0.25            as above

Custom "Engines", child of "Wing"
  location (X Y Z) 23.1739 10.5435 -1.30435, rotation 0 0 0; relative location 5.63293 10.5435 -0.730577, rotation 0 0 0
  symmetric about XZ
  bounding box size 7 25.7874 4.76445
  Design: Camber=0 CamberLoc=0.2 Chord=7 Height=4 InvertFlag=0 Shape=0 ThickChord=0.1 Width=4
  custom script Duct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

Wing "HTail", child of "Fuselage"
  location (X Y Z) 49 0 1.31148, rotation 0 0 0
  symmetric about XZ
  bounding box size 10.0643 20.7956 1.7875
  totals: TotalSpan=21 TotalProjectedSpan=20.7956 TotalChord=2.8 TotalArea=84.3 TotalAR=5.12999 MAC=4.81691
  root: chord 7, twist 0, NACA 4-series Camber=0.022 CamberLoc=0.2 ThickChord=0.12
  sections:
    n  Span  Root_Chord  Tip_Chord  Area  Sweep  Sweep_Location  Dihedral  Twist  Twist_Location  tip airfoil
    1  9     7           2          40.5  40     0               8         0      0.25            as above
    2  1.5   2           0.2        1.65  57     0               8         0      0.25            as above

Wing "VTail", child of "Fuselage"
  location (X Y Z) 45 0 2.5, rotation 90 0 0
  bounding box size 13.5241 1.00058 10
  totals: TotalSpan=10 TotalProjectedSpan=10 TotalChord=4.325 TotalArea=60.225 TotalAR=1.66044 MAC=7.05045
  root: chord 10, twist 0, NACA 4-series Camber=0 CamberLoc=0.2 ThickChord=0.1
  sections:
    n  Span  Root_Chord  Tip_Chord  Area    Sweep    Sweep_Location  Dihedral  Twist  Twist_Location  tip airfoil
    1  8.5   10          3.5        57.375  48.2143  0               0         0      0.25            as above
    2  1.5   3.5         0.3        2.85    68       0               0         0      0.25            as above
