OpenVSP model (file version 5), 3 components.
Geometry view with OpenVSP parameter names; values to 6 digits, angles in degrees, lengths in the model's unit.
Overall bounding box: X_Min=-0.320564 X_Len=42.1677 Y_Min=-34.5062 Y_Len=69.0124 Z_Min=-3.28726 Z_Len=8.21215

Wing "WingGeom"
  location (X Y Z) 0 0 0, rotation 0 0 0
  symmetric about XZ
  bounding box size 42.1562 69.0124 8.21215
  totals: TotalSpan=71 TotalProjectedSpan=69.0124 TotalChord=13.6875 TotalArea=815.75 TotalAR=5.83845 MAC=23.4381
  root: chord 40, twist 0, edit curve Width=40 Height=4 AbsoluteFlag=0 SymType=0 PCHIP points (X Y): 0.532192 0.308219, 0.371918 -0.236712, 0.158219 -0.76274, 0.00205479 -0.815343, -0.429452 -0.552329, -0.507534 -0.236712, -0.458219 0.107877, -0.326712 0.446918, 0.297945 0.636986, 0.45411 0.539384, 0.532192 0.308219
  sections:
    n  Span  Root_Chord  Tip_Chord  Area     Sweep  Sweep_Location  Dihedral  Twist  Twist_Location  tip airfoil
    1  6.25  40          23.75      199.219  63     0               4         0      0.25            edit curve Width=23.75 Height=2.5 AbsoluteFlag=0 SymType=0 PCHIP points (X Y): 0.532192 0.308219, 0.371918 -0.236712, 0.158219 -0.76274, 0.00205479 -0.815343, -0.429452 -0.552329, -0.507534 -0.236712, -0.458219 0.107877, -0.326712 0.446918, 0.297945 0.636986, 0.45411 0.539384, 0.532192 0.308219
    2  6.25  23.75       7.5        97.6562  63     0               5         0      0.25            NACA 4-series Camber=0.02 CamberLoc=0.2 ThickChord=0.12
    3  20    7.5         3          105      30     0               5         0      0.25            as above
    4  3     3           1          6        50     0               45        0      0.25            as above

Wing "Engine_Supports", child of "WingGeom"
  location (X Y Z) 37 3 1.5, rotation 90 0 0
  symmetric about XZ
  bounding box size 3.31865 6.30014 1.05
  totals: TotalSpan=2.1 TotalProjectedSpan=2.1 TotalChord=2 TotalArea=4.2 TotalAR=1.05 MAC=2.04167
  root: chord 2.5, twist 0, NACA 4-series Camber=0 CamberLoc=0.2 ThickChord=0.12
  sections:
    n  Span  Root_Chord  Tip_Chord  Area  Sweep  Sweep_Location  Dihedral  Twist  Twist_Location  tip airfoil
    1  1.05  2.5         1.5        2.1   60     0               0         0      0.25            as above

Duct "Engines"
  location (X Y Z) 40 3 3.5, rotation 0 5 0
  symmetric about XZ
  bounding box size 3.69431 8.3502 2.6782
  Design: Camber=0 CamberLoc=0.2 Chord=3.5 Height=2 InvertFlag=0 Shape=0 ThickChord=0.1 Width=2
  custom script Duct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
